*Heading
** Job name: 4163f916-a9ea-44d8-9a3a-ad40a93298a7 Model name: flat_panel
** Generated by: Abaqus/CAE 2020
*Preprint, echo=NO, model=NO, history=NO, contact=NO
**
** PARTS
**
*Part, name=panel
*Node
      1,          1.5,           0.,           3.
      2,   1.47222221,           0.,           3.
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*Element, type=S4R
    1,     1,     2,   111,   110
    2,     2,     3,   112,   111
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*Nset, nset=PlateFace, generate
     1,  11881,      1
*Elset, elset=PlateFace, generate
     1,  11664,      1
*Nset, nset=_PickedSet6_#1, internal, generate
     1,  11881,      1
*Elset, elset=_PickedSet6_#1, internal, generate
     1,  11664,      1
** Section: panel
*Shell Section, elset=_PickedSet6_#1, material=steel
0.0461836, 5
*End Part
**
**
** ASSEMBLY
**
*Assembly, name=Assembly
**
*Instance, name=panel, part=panel
        -1.5,           0.,           0.
        -1.5,           0.,           0., -0.922649730810374, 0.577350269189626, 0.577350269189626,         120.
*End Instance
**
*Nset, nset=load_set, instance=panel
  9348,  9349,  9350,  9351,  9352,  9353
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*Nset, nset=plate-edge, instance=panel
     1,     2,     3,     4,     5,     6
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*End Assembly
**
** MATERIALS
**
*Material, name=steel
*Density
7850., 296.15
*Elastic
 2.1e+11, 0.3
*Plastic
    3.55e+08,    0.
    3.55e+08, 0.006
 3.56713e+08, 0.016
 3.60895e+08, 0.026
 3.68869e+08, 0.046
  3.7638e+08, 0.066
 3.83488e+08, 0.086
**
** BOUNDARY CONDITIONS
**
** Name: Edge-BC Type: Displacement/Rotation
*Boundary
plate-edge, 1, 1
plate-edge, 2, 2
plate-edge, 3, 3
** ----------------------------------------------------------------
**
** STEP: Step-1
**
*Step, name=Step-1, nlgeom=NO, inc=50
*Static
1., 1., 1e-05, 1.
**
** LOADS
**
** Name: Load   Type: Concentrated force
*Cload
load_set, 1, 0.
load_set, 2, 0.
load_set, 3, 100.
**
** OUTPUT REQUESTS
**
*Restart, write, frequency=0
**
** FIELD OUTPUT: F-Output-1
**
*Output, field, variable=PRESELECT
**
** HISTORY OUTPUT: H-Output-1
**
*Output, history, variable=PRESELECT
*End Step
