*Heading
** Job name: SP1-UC1-e-s Model name: eigen
** Generated by: Abaqus/CAE 2022
*Preprint, echo=NO, model=NO, history=NO, contact=NO
**
** PARTS
**
*Part, name=panel
*Node
      1,  0.899999976,           0.,           3.
      2,  0.899999976,           0.,           0.
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*Element, type=S4R
   1,    1,   37, 3065,  392
   2,   37,   38, 3066, 3065
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*Elset, elset=_PickedSet2, internal, generate
     1,  22500,      1
*Elset, elset=_PickedSet3, internal
 22501, 22502, 22503, 22504, 22505, 22506
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*Elset, elset=_PickedSet4, internal
 23401, 23402, 23403, 23404, 23405, 23406
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*Elset, elset=_PickedSet5, internal
 22504, 22505, 22506, 22510, 22511, 22512
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** Section: plate
*Shell Section, elset=_PickedSet2, material=steel
0.01, 5
** Region: (web:Picked)
*Elset, elset=_I2, internal
 22501, 22502, 22503, 22507, 22508, 22509
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** Section: web
*Shell Section, elset=_I2, material=steel
0.078, 5
** Section: local-web-thickness
*Shell Section, elset=_PickedSet5, material=steel
0.78, 5
** Section: flange
*Shell Section, elset=_PickedSet4, material=steel
0.004, 5
*End Part
**
**
** ASSEMBLY
**
*Assembly, name=Assembly
**
*Instance, name=panel-1, part=panel
        -1.5,           0.,           0.
        -1.5,           0.,           0., -0.922649730810374, 0.577350269189626, 0.577350269189626,         120.
*End Instance
**
*Nset, nset=Fixed-Centroid-Follow, instance=panel-1, generate
 1686,  2608,   461
*Nset, nset=Fixed-Centroid-Master, instance=panel-1
 1225,
*Nset, nset=Fixed-Edge-Follow, instance=panel-1
    1,    4,    5,    8,   11,  364
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*Nset, nset=Fixed-Edge-Master, instance=panel-1
 9,
*Nset, nset=Free-Centroid-Follow, instance=panel-1
 1226, 1687, 2609
*Nset, nset=Free-Centroid-Master, instance=panel-1
 2148,
*Nset, nset=Free-Edge-Follow, instance=panel-1
    2,    6,    7,   10,   12,  186
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*Nset, nset=Free-Edge-Master, instance=panel-1
 3,
*Nset, nset=Web1-Follow, instance=panel-1
    1,   25,   26, 2143, 2144, 2145, 2146, 2147, 2148, 2149, 2150, 2151, 2152
*Nset, nset=Web1-Master, instance=panel-1
 2,
*Nset, nset=Web2-Follow, instance=panel-1
    5,   19,   20, 1682, 1683, 1684, 1685, 1686, 1687, 1688, 1689, 1690, 1691
*Nset, nset=Web2-Master, instance=panel-1
 6,
*Nset, nset=Web3-Follow, instance=panel-1
   11,   31,   32, 2604, 2605, 2606, 2607, 2608, 2609, 2610, 2611, 2612, 2613
*Nset, nset=Web3-Master, instance=panel-1
 12,
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*Nset, nset=_PickedSet19, internal, instance=panel-1, generate
 1225,  2608,   461
*Nset, nset=_PickedSet51, internal, instance=panel-1, generate
 1226,  2609,   461
*Nset, nset=_PickedSet53, internal, instance=panel-1
 18188,
*Nset, nset=_PickedSet56, internal, instance=panel-1, generate
 1225,  2608,   461
*Nset, nset=_PickedSet59, internal, instance=panel-1
  215,  216,  217,  218,  219,  220
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** Constraint: Constraint-1
*Equation
2
Free-Edge-Follow, 1, 1.
Free-Edge-Master, 1, -1.
** Constraint: Constraint-2
*Equation
2
Fixed-Edge-Follow, 1, 1.
Fixed-Edge-Master, 1, -1.
** Constraint: Constraint-3
*Equation
2
Free-Centroid-Follow, 1, 1.
Free-Centroid-Master, 1, -1.
** Constraint: Constraint-4
*Equation
2
Web1-Follow, 2, 1.
Web1-Master, 2, -1.
** Constraint: Constraint-5
*Equation
2
Web2-Follow, 2, 1.
Web2-Master, 2, -1.
** Constraint: Constraint-6
*Equation
2
Web3-Follow, 2, 1.
Web3-Master, 2, -1.
** Constraint: Constraint-7
*Equation
2
Web4-Follow, 2, 1.
Web4-Master, 2, -1.
*End Assembly
**
** MATERIALS
**
*Material, name=steel
*Density
7850.,
*Elastic
 2.1e+11, 0.3
** ----------------------------------------------------------------
**
** STEP: eigen
**
*Step, name=eigen, nlgeom=NO, perturbation
*Buckle
5, , 10, 500
**
** BOUNDARY CONDITIONS
**
** Name: Centre Type: Displacement/Rotation
*Boundary, op=NEW, load case=1
_PickedSet53, 2, 2
*Boundary, op=NEW, load case=2
_PickedSet53, 2, 2
** Name: Edge Type: Displacement/Rotation
*Boundary, op=NEW, load case=1
_PickedSet59, 3, 3
*Boundary, op=NEW, load case=2
_PickedSet59, 3, 3
** Name: Fixed-End Type: Displacement/Rotation
*Boundary, op=NEW, load case=1
_PickedSet19, 1, 1
*Boundary, op=NEW, load case=2
_PickedSet19, 1, 1
**
** LOADS
**
** Name: Load-1   Type: Concentrated force
*Cload
_PickedSet51, 1, 250000.
**
** OUTPUT REQUESTS
**
*Restart, write, frequency=0
**
** FIELD OUTPUT: F-Output-1
**
*Output, field, variable=PRESELECT
*End Step
