*Heading
** Job name: eigen-complete Model name: eigen-complete
** Generated by: Abaqus/CAE 2020
*Preprint, echo=NO, model=NO, history=NO, contact=NO
**
** PARTS
**
*Part, name=panel
*Node
      1,  0.899999976,           0.,           3.
      2,  0.899999976,           0.,           0.
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*Element, type=S4R
   1,    1,   37, 3065,  392
   2,   37,   38, 3066, 3065
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*Elset, elset=_PickedSet2, internal, generate
     1,  22500,      1
*Elset, elset=_PickedSet3, internal
 22501, 22502, 22503, 22504, 22505, 22506
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*Elset, elset=_PickedSet4, internal
 23401, 23402, 23403, 23404, 23405, 23406
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*Elset, elset=_PickedSet5, internal
 22504, 22505, 22506, 22510, 22511, 22512
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** Section: plate
*Shell Section, elset=_PickedSet2, material=M1
0.01, 5
** Region: (web:Picked)
*Elset, elset=_I2, internal
 22501, 22502, 22503, 22507, 22508, 22509
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** Section: web
*Shell Section, elset=_I2, material=M1
0.0078, 5
** Section: local-thickness
*Shell Section, elset=_PickedSet5, material=M1
0.078, 5
** Section: flange
*Shell Section, elset=_PickedSet4, material=M1
0.004, 5
*End Part
**
**
** ASSEMBLY
**
*Assembly, name=Assembly
**
*Instance, name=panel-1, part=panel
        -1.5,           0.,           0.
        -1.5,           0.,           0., -0.922649730810374, 0.577350269189626, 0.577350269189626,         120.
*End Instance
**
*Nset, nset=Fixed-Edge-Follower, instance=panel-1
    1,    4,    5,    8,   11,  364
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*Nset, nset=Fixed-Edge-Main, instance=panel-1
 9,
*Nset, nset=Free-Edge-Follower, instance=panel-1
    2,    6,    7,   10,   12,  186
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*Nset, nset=Free-Edge-Main, instance=panel-1
 3,
*Nset, nset=Load-Follower, instance=panel-1, generate
 1687,  2609,   461
*Nset, nset=Load-Main, instance=panel-1
 1226,
*Nset, nset=Web1-Follower, instance=panel-1
    1,   25,   26, 2143, 2144, 2145, 2146, 2147, 2148, 2149, 2150, 2151, 2152
*Nset, nset=Web1-Main, instance=panel-1
 2,
*Nset, nset=Web2-Follower, instance=panel-1
    5,   19,   20, 1682, 1683, 1684, 1685, 1686, 1687, 1688, 1689, 1690, 1691
*Nset, nset=Web2-Main, instance=panel-1
 6,
*Nset, nset=Web3-Follower, instance=panel-1
   11,   31,   32, 2604, 2605, 2606, 2607, 2608, 2609, 2610, 2611, 2612, 2613
*Nset, nset=Web3-Main, instance=panel-1
 12,
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*Nset, nset=_PickedSet66, internal, instance=panel-1
    1,    2,    3,    4,    5,    6
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*Nset, nset=_PickedSet67, internal, instance=panel-1
 18188,
*Nset, nset=_PickedSet68, internal, instance=panel-1, generate
 1225,  2608,   461
*Nset, nset=_PickedSet69, internal, instance=panel-1
 1226,
** Constraint: Fixed-Edge
*Equation
2
Fixed-Edge-Follower, 1, 1.
Fixed-Edge-Main, 1, -1.
** Constraint: Free-Edge
*Equation
2
Free-Edge-Follower, 1, 1.
Free-Edge-Main, 1, -1.
** Constraint: Load
*Equation
2
Load-Follower, 1, 1.
Load-Main, 1, -1.
** Constraint: Web1
*Equation
2
Web1-Follower, 2, 1.
Web1-Main, 2, -1.
** Constraint: Web2
*Equation
2
Web2-Follower, 2, 1.
Web2-Main, 2, -1.
** Constraint: Web3
*Equation
2
Web3-Follower, 2, 1.
Web3-Main, 2, -1.
** Constraint: Web4
*Equation
2
Web4-Follower, 2, 1.
Web4-Main, 2, -1.
*End Assembly
**
** MATERIALS
**
** Isotropic steel
*Material, name=M1
*Density
7850.,
*Elastic
 2.1e+11, 0.3
** ----------------------------------------------------------------
**
** STEP: buckle
**
*Step, name=buckle, nlgeom=NO, perturbation
*Buckle
5, , 10, 300
**
** BOUNDARY CONDITIONS
**
** Name: Centre Type: Displacement/Rotation
*Boundary, op=NEW, load case=1
_PickedSet67, 2, 2
*Boundary, op=NEW, load case=2
_PickedSet67, 2, 2
** Name: Edge Type: Displacement/Rotation
*Boundary, op=NEW, load case=1
_PickedSet66, 3, 3
*Boundary, op=NEW, load case=2
_PickedSet66, 3, 3
** Name: End Type: Displacement/Rotation
*Boundary, op=NEW, load case=1
_PickedSet68, 1, 1
*Boundary, op=NEW, load case=2
_PickedSet68, 1, 1
**
** LOADS
**
** Name: Load-1   Type: Concentrated force
*Cload
_PickedSet69, 1, 1e+06
**
** OUTPUT REQUESTS
**
*Restart, write, frequency=0
**
** FIELD OUTPUT: F-Output-1
**
*Output, field, variable=PRESELECT
*End Step
