*Heading
** Job name: eigen Model name: eigen
** Generated by: Abaqus/CAE 2020
*Preprint, echo=NO, model=NO, history=NO, contact=NO
**
** PARTS
**
*Part, name=panel
*Node
      1,  0.899999976,           0.,           3.
      2,  0.899999976,           0.,           0.
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*Element, type=S4R
   1,    1,   37, 3065,  392
   2,   37,   38, 3066, 3065
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*Nset, nset=PlateFace
     1,     2,     3,     4,     5,     6
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*Elset, elset=PlateFace, generate
     1,  22500,      1
*Nset, nset=FlangeFaces
    13,    14,    15,    16,    17,    18
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*Elset, elset=FlangeFaces
 23401, 23402, 23403, 23404, 23405, 23406
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*Nset, nset=WebFaces
     1,     2,     5,     6,     7,     8
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*Elset, elset=WebFaces
 22501, 22502, 22503, 22504, 22505, 22506
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*Nset, nset=_PickedSet10_#1, internal
     1,     2,     3,     4,     5,     6
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*Elset, elset=_PickedSet10_#1, internal, generate
     1,  22500,      1
*Nset, nset=_PickedSet11_#1, internal
     1,     2,     5,     6,     7,     8
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*Elset, elset=_PickedSet11_#1, internal
 22501, 22502, 22503, 22504, 22505, 22506
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*Nset, nset=_PickedSet12_#1, internal
    13,    14,    15,    16,    17,    18
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*Elset, elset=_PickedSet12_#1, internal
 23401, 23402, 23403, 23404, 23405, 23406
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*Elset, elset=Local-Thickness-Free
 23386, 23387, 23388, 23392, 23393, 23394
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*Elset, elset=Local-Thickness-Fixed
 22504, 22505, 22506, 22510, 22511, 22512
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** Section: t-0.01
*Shell Section, elset=_PickedSet10_#1, material=steel
0.01, 5
** Region: (t-0.0078:Picked)
*Elset, elset=_I2, internal
 22501, 22502, 22503, 22507, 22508, 22509
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** Section: t-0.0078
*Shell Section, elset=_I2, material=steel
0.0078, 5
** Section: local-thickness
*Shell Section, elset=Local-Thickness-Fixed, material=steel
0.039, 5
** Section: local-thickness
*Shell Section, elset=Local-Thickness-Free, material=steel
0.039, 5
** Section: t-0.004
*Shell Section, elset=_PickedSet12_#1, material=steel
0.004, 5
*End Part
**
**
** ASSEMBLY
**
*Assembly, name=Assembly
**
*Instance, name=panel, part=panel
        -1.5,           0.,           0.
        -1.5,           0.,           0., -0.922649730810374, 0.577350269189626, 0.577350269189626,         120.
*End Instance
**
*Nset, nset=Fixed-BC, instance=panel, generate
 1225,  2608,   461
*Nset, nset=Fixed-End-Follower, instance=panel
    3,    6,    7,   10,   12,  186
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*Nset, nset=Fixed-End-Main, instance=panel
 2,
*Nset, nset=Free-End-Follower, instance=panel
    4,    5,    8,    9,   11,  364
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*Nset, nset=Free-End-Main, instance=panel
 1,
*Nset, nset=Load-Follower, instance=panel, generate
 1687,  2609,   461
*Nset, nset=Load-Main, instance=panel
 1226,
*Nset, nset=Web0-Follower, instance=panel
    8,   13,   14, 1221, 1222, 1223, 1224, 1225, 1226, 1227, 1228, 1229, 1230
*Nset, nset=Web0-Main, instance=panel
 7,
*Nset, nset=Web1-Follower, instance=panel
   12,   31,   32, 2604, 2605, 2606, 2607, 2608, 2609, 2610, 2611, 2612, 2613
*Nset, nset=Web1-Main, instance=panel
 11,
*Nset, nset=Web2-Follower, instance=panel
    6,   19,   20, 1682, 1683, 1684, 1685, 1686, 1687, 1688, 1689, 1690, 1691
*Nset, nset=Web2-Main, instance=panel
 5,
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*Nset, nset=load_set, instance=panel
 1226,
*Nset, nset=middle-bc, instance=panel
 18188,
*Nset, nset=plate-edge, instance=panel
    1,    2,    3,    4,    5,    6
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** Constraint: Fixed-End-1
*Equation
2
Fixed-End-Follower, 1, 1.
Fixed-End-Main, 1, -1.
** Constraint: Free-End-1
*Equation
2
Free-End-Follower, 1, 1.
Free-End-Main, 1, -1.
** Constraint: Load-1
*Equation
2
Load-Follower, 1, 1.
Load-Main, 1, -1.
** Constraint: Web0-2
*Equation
2
Web0-Follower, 2, 1.
Web0-Main, 2, -1.
** Constraint: Web1-2
*Equation
2
Web1-Follower, 2, 1.
Web1-Main, 2, -1.
** Constraint: Web2-2
*Equation
2
Web2-Follower, 2, 1.
Web2-Main, 2, -1.
** Constraint: Web3-2
*Equation
2
Web3-Follower, 2, 1.
Web3-Main, 2, -1.
*End Assembly
**
** MATERIALS
**
*Material, name=steel
*Density
7850., 296.15
*Elastic
 2e+11, 0.3
*Plastic
    3.55e+08,    0.
    3.55e+08, 0.006
 3.56713e+08, 0.016
 3.60895e+08, 0.026
 3.68869e+08, 0.046
  3.7638e+08, 0.066
 3.83488e+08, 0.086
**
** BOUNDARY CONDITIONS
**
** Name: Edge-BC Type: Displacement/Rotation
*Boundary
plate-edge, 3, 3
** Name: Fixed-BC Type: Displacement/Rotation
*Boundary
Fixed-BC, 1, 1
** Name: Middle-BC Type: Displacement/Rotation
*Boundary
middle-bc, 2, 2
** ----------------------------------------------------------------
**
** STEP: Buckle-Step
**
*Step, name=Buckle-Step, nlgeom=NO, perturbation
*Buckle
5, , 10, 500
**
** BOUNDARY CONDITIONS
**
** Name: Edge-BC Type: Displacement/Rotation
*Boundary, op=NEW, load case=1
plate-edge, 3, 3
*Boundary, op=NEW, load case=2
plate-edge, 3, 3
** Name: Fixed-BC Type: Displacement/Rotation
*Boundary, op=NEW, load case=1
Fixed-BC, 1, 1
*Boundary, op=NEW, load case=2
Fixed-BC, 1, 1
** Name: Middle-BC Type: Displacement/Rotation
*Boundary, op=NEW, load case=1
middle-bc, 2, 2
*Boundary, op=NEW, load case=2
middle-bc, 2, 2
**
** LOADS
**
** Name: Load   Type: Concentrated force
*Cload
load_set, 1, 1e+06
load_set, 2, 0.
load_set, 3, 0.
**
** OUTPUT REQUESTS
**
*Restart, write, frequency=0
**
** FIELD OUTPUT: F-Output-1
**
*Output, field, variable=PRESELECT
*End Step
