*Heading
** Job name: SP1-T1-e Model name: eigen
** Generated by: Abaqus/CAE 2022
*Preprint, echo=NO, model=NO, history=NO, contact=NO
**
** PARTS
**
*Part, name=panel
*Node
      1,          1.5,           0.,           3.
      2,   1.48000002,           0.,           3.
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*Element, type=S4R
    1,     1,     2,   153,   152
    2,     2,     3,   154,   153
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*Nset, nset=_PickedSet4_#1, internal, generate
     1,  22801,      1
*Elset, elset=_PickedSet4_#1, internal, generate
     1,  22500,      1
** Section: plate
*Shell Section, elset=_PickedSet4_#1, material=M1
0.01, 5
*End Part
**
**
** ASSEMBLY
**
*Assembly, name=Assembly
**
*Instance, name=panel-1, part=panel
        -1.5,           0.,           0.
        -1.5,           0.,           0., -2.07735026918963, 0.577350269189626, -0.577350269189626,         120.
*End Instance
**
*Nset, nset=Follower, instance=panel-1, generate
 22651,  22800,      1
*Nset, nset=Main, instance=panel-1
 22801,
*Nset, nset=_PickedSet10, internal, instance=panel-1, generate
 22651,  22801,      1
*Nset, nset=_PickedSet11, internal, instance=panel-1
     1,     2,     3,     4,     5,     6
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*Nset, nset=_PickedSet14, internal, instance=panel-1, generate
   1,  151,    1
*Nset, nset=_PickedSet15, internal, instance=panel-1
 11401,
** Constraint: Constraint-1
*Equation
2
Follower, 1, 1.
Main, 1, -1.
*End Assembly
**
** MATERIALS
**
** Isotropic Steel
*Material, name=M1
*Density
7850.,
*Elastic
 2.1e+11, 0.3
** ----------------------------------------------------------------
**
** STEP: eigen
**
*Step, name=eigen, nlgeom=NO, perturbation
*Buckle
5, , 10, 30
**
** BOUNDARY CONDITIONS
**
** Name: BC-1 Type: Displacement/Rotation
*Boundary, op=NEW, load case=1
_PickedSet11, 3, 3
*Boundary, op=NEW, load case=2
_PickedSet11, 3, 3
** Name: BC-2 Type: Displacement/Rotation
*Boundary, op=NEW, load case=1
_PickedSet14, 1, 1
*Boundary, op=NEW, load case=2
_PickedSet14, 1, 1
** Name: BC-3 Type: Displacement/Rotation
*Boundary, op=NEW, load case=1
_PickedSet15, 2, 2
*Boundary, op=NEW, load case=2
_PickedSet15, 2, 2
**
** LOADS
**
** Name: Load-1   Type: Concentrated force
*Cload
_PickedSet10, 1, 10000.
**
** OUTPUT REQUESTS
**
*Restart, write, frequency=0
**
** FIELD OUTPUT: F-Output-1
**
*Output, field, variable=PRESELECT
*End Step
