*Heading
** Job name: SP1-T2-r Model name: riks
** Generated by: Abaqus/CAE 2020
*Preprint, echo=NO, model=NO, history=NO, contact=NO
**
** PARTS
**
*Part, name=panel
*Node
      1,          1.5,          1.5,           0.
      2,   1.48000002,          1.5,           0.
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*Element, type=S4R
    1,     1,     2,   153,   152
    2,     2,     3,   154,   153
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*Elset, elset=_PickedSet2, internal, generate
     1,  22500,      1
** Section: plate
*Shell Section, elset=_PickedSet2, material=M1
0.01, 5
*End Part
**
**
** ASSEMBLY
**
*Assembly, name=Assembly
**
*Instance, name=panel-1, part=panel
*End Instance
**
*Nset, nset=Load-Follower, instance=panel-1, generate
   302,  22801,    151
*Nset, nset=Load-Main, instance=panel-1
 151,
*Nset, nset=_PickedSet6, internal, instance=panel-1
 11476,
*Nset, nset=_PickedSet7, internal, instance=panel-1
     1,     2,     3,     4,     5,     6
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*Nset, nset=_PickedSet8, internal, instance=panel-1
 11401,
*Nset, nset=_PickedSet9, internal, instance=panel-1, generate
     1,  22651,    151
** Constraint: End-Link
*Equation
2
Load-Follower, 1, 1.
Load-Main, 1, -1.
*End Assembly
**
** MATERIALS
**
** Isotropic steel
*Material, name=M1
*Density
7850.,
*Elastic
 2.1e+11, 0.3
** ----------------------------------------------------------------
**
** STEP: riks
**
*IMPERFECTION, FILE=SP1-T2-e, STEP=1
1, 0.00061
*STEP, NLGEOM, INC=50
Incremental
*STATIC, RIKS
    .05, 1., , , 11.5
**
** BOUNDARY CONDITIONS
**
** Name: Centre Type: Displacement/Rotation
*Boundary
_PickedSet8, 2, 2
** Name: Edge Type: Displacement/Rotation
*Boundary
_PickedSet7, 3, 3
** Name: End Type: Displacement/Rotation
*Boundary
_PickedSet9, 1, 1
**
** LOADS
**
** Name: Load-1   Type: Concentrated force
*Cload
_PickedSet6, 1, 1e+06
**
** OUTPUT REQUESTS
**
*Restart, write, frequency=0
**
** FIELD OUTPUT: F-Output-1
**
*Output, field, variable=PRESELECT
**
** HISTORY OUTPUT: H-Output-1
**
*Output, history, variable=PRESELECT
*End Step
