*Heading
** Job name: eigen-web-panel Model name: eigen-web-panel
** Generated by: Abaqus/CAE 2020
*Preprint, echo=NO, model=NO, history=NO, contact=NO
**
** PARTS
**
*Part, name=panel
*Node
      1,           0.,           0.,           3.
      2,           0.,           0.,           0.
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*Element, type=S4R
    1,     1,     9,   911,   454
    2,     9,    10,   912,   911
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*Elset, elset=_PickedSet2, internal, generate
     1,  22500,      1
*Elset, elset=_PickedSet3, internal, generate
 22501,  23400,      1
*Elset, elset=_PickedSet4, internal
 22504, 22505, 22506, 22510, 22511, 22512
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** Section: plate
*Shell Section, elset=_PickedSet2, material=M1
0.01, 5
** Region: (web:Picked)
*Elset, elset=_I2, internal
 22501, 22502, 22503, 22507, 22508, 22509
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** Section: web
*Shell Section, elset=_I2, material=M1
0.0078, 5
** Section: local-thickness
*Shell Section, elset=_PickedSet4, material=M1
0.078, 5
*End Part
**
**
** ASSEMBLY
**
*Assembly, name=Assembly
**
*Instance, name=panel-1, part=panel
        -1.5,           0.,           0.
        -1.5,           0.,           0., -0.922649730810374, 0.577350269189626, 0.577350269189626,         120.
*End Instance
**
*Nset, nset=Fixed-Follower, instance=panel-1
   1,   5, 381, 382, 383, 384
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*Nset, nset=Fixed-Main, instance=panel-1
 4,
*Nset, nset=Load-Follower, instance=panel-1
   2,   6, 158, 159, 160, 161
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*Nset, nset=Load-Main, instance=panel-1
 3,
*Nset, nset=Web-Follower, instance=panel-1
   1,   7,   8, 752, 753, 754, 755, 756, 757, 758, 759, 760, 761
*Nset, nset=Web-Main, instance=panel-1
 2,
*Nset, nset=_PickedSet14, internal, instance=panel-1
 757,
*Nset, nset=_PickedSet15, internal, instance=panel-1
   1,   2,   3,   4,   5,   6
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*Nset, nset=_PickedSet26, internal, instance=panel-1
 756,
*Nset, nset=_PickedSet27, internal, instance=panel-1
 83,
** Constraint: End
*Equation
2
Load-Follower, 1, 1.
Load-Main, 1, -1.
** Constraint: Fixed
*Equation
2
Fixed-Follower, 1, 1.
Fixed-Main, 1, -1.
** Constraint: Web
*Equation
2
Web-Follower, 2, 1.
Web-Main, 2, -1.
*End Assembly
**
** MATERIALS
**
** Isotropic steel
*Material, name=M1
*Density
7850.,
*Elastic
 2.1e+11, 0.3
** ----------------------------------------------------------------
**
** STEP: buckle
**
*Step, name=buckle, nlgeom=NO, perturbation
*Buckle
5, , 10, 300
**
** BOUNDARY CONDITIONS
**
** Name: Centre Type: Displacement/Rotation
*Boundary, op=NEW, load case=1
_PickedSet27, 2, 2
*Boundary, op=NEW, load case=2
_PickedSet27, 2, 2
** Name: Edge Type: Displacement/Rotation
*Boundary, op=NEW, load case=1
_PickedSet15, 3, 3
*Boundary, op=NEW, load case=2
_PickedSet15, 3, 3
** Name: Fixed Type: Displacement/Rotation
*Boundary, op=NEW, load case=1
_PickedSet26, 1, 1
*Boundary, op=NEW, load case=2
_PickedSet26, 1, 1
**
** LOADS
**
** Name: Load-1   Type: Concentrated force
*Cload
_PickedSet14, 1, 1e+06
**
** OUTPUT REQUESTS
**
*Restart, write, frequency=0
**
** FIELD OUTPUT: F-Output-1
**
*Output, field, variable=PRESELECT
*End Step
