*Heading
** Job name: buckling_eigen_panel Model name: Model-1
** Generated by: Abaqus/CAE 2020
*Preprint, echo=NO, model=NO, history=NO, contact=NO
**
** PARTS
**
*Part, name=panel
*Node
      1,  -1.20000005,         -1.5,           0.
      2,  -1.22000003,         -1.5,           0.
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*Element, type=S4R
    1,  2174,  2175,  2585,  2190
    2,  2175,  2176,  2586,  2585
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*Elset, elset=sectionAssignment, generate
     1,  26820,      1
*Elset, elset=left-thickness-region
 23090, 23094, 23095, 23098, 23099, 23100
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*Elset, elset=right_thickness_region
 22503, 22504, 22505, 22509, 22510, 22515
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** Region: (t-0.01:sectionAssignment)
*Elset, elset=_I1, internal
     1,     2,     3,     4,     5,     6
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** Section: t-0.01
*Shell Section, elset=_I1, material=steel
0.01, 5
** Section: local-thickness
*Shell Section, elset=right_thickness_region, material=steel
0.039, 5
** Section: local-thickness
*Shell Section, elset=left-thickness-region, material=steel
0.039, 5
*End Part
**
**
** ASSEMBLY
**
*Assembly, name=Assembly
**
*Instance, name=panel, part=panel
*End Instance
**
*Nset, nset=Fixed-BC, instance=panel
 2248, 2307, 2423, 2483
*Nset, nset=equation-set-panel-panel-59-75-1, instance=panel
 59,
*Nset, nset=equation-set-panel-panel-59-75-2, instance=panel
 75,
*Nset, nset=equation-set-panel-panel-75-87-1, instance=panel
 75,
*Nset, nset=equation-set-panel-panel-75-87-2, instance=panel
 87,
*Nset, nset=equation-set-panel-panel-75-131-1, instance=panel
 75,
*Nset, nset=equation-set-panel-panel-75-131-2, instance=panel
 131,
*Nset, nset=equation-set-panel-panel-87-88-1, instance=panel
 87,
*Nset, nset=equation-set-panel-panel-87-88-2, instance=panel
 88,
*Nset, nset=equation-set-panel-panel-88-89-1, instance=panel
 88,
*Nset, nset=equation-set-panel-panel-88-89-2, instance=panel
 89,
*Nset, nset=equation-set-panel-panel-89-90-1, instance=panel
 89,
*Nset, nset=equation-set-panel-panel-89-90-2, instance=panel
 90,
*Nset, nset=equation-set-panel-panel-90-91-1, instance=panel
 90,
*Nset, nset=equation-set-panel-panel-90-91-2, instance=panel
 91,
*Nset, nset=equation-set-panel-panel-91-2232-1, instance=panel
 91,
*Nset, nset=equation-set-panel-panel-91-2232-2, instance=panel
 2232,
*Nset, nset=equation-set-panel-panel-130-131-1, instance=panel
 130,
*Nset, nset=equation-set-panel-panel-130-131-2, instance=panel
 131,
*Nset, nset=equation-set-panel-panel-131-143-1, instance=panel
 131,
*Nset, nset=equation-set-panel-panel-131-143-2, instance=panel
 143,
*Nset, nset=equation-set-panel-panel-131-242-1, instance=panel
 131,
*Nset, nset=equation-set-panel-panel-131-242-2, instance=panel
 242,
*Nset, nset=equation-set-panel-panel-143-144-1, instance=panel
 143,
*Nset, nset=equation-set-panel-panel-143-144-2, instance=panel
 144,
*Nset, nset=equation-set-panel-panel-144-145-1, instance=panel
 144,
*Nset, nset=equation-set-panel-panel-144-145-2, instance=panel
 145,
*Nset, nset=equation-set-panel-panel-145-146-1, instance=panel
 145,
*Nset, nset=equation-set-panel-panel-145-146-2, instance=panel
 146,
*Nset, nset=equation-set-panel-panel-146-147-1, instance=panel
 146,
*Nset, nset=equation-set-panel-panel-146-147-2, instance=panel
 147,
*Nset, nset=equation-set-panel-panel-147-2306-1, instance=panel
 147,
*Nset, nset=equation-set-panel-panel-147-2306-2, instance=panel
 2306,
*Nset, nset=equation-set-panel-panel-227-242-1, instance=panel
 227,
*Nset, nset=equation-set-panel-panel-227-242-2, instance=panel
 242,
*Nset, nset=equation-set-panel-panel-242-254-1, instance=panel
 242,
*Nset, nset=equation-set-panel-panel-242-254-2, instance=panel
 254,
*Nset, nset=equation-set-panel-panel-242-299-1, instance=panel
 242,
*Nset, nset=equation-set-panel-panel-242-299-2, instance=panel
 299,
*Nset, nset=equation-set-panel-panel-254-255-1, instance=panel
 254,
*Nset, nset=equation-set-panel-panel-254-255-2, instance=panel
 255,
*Nset, nset=equation-set-panel-panel-255-256-1, instance=panel
 255,
*Nset, nset=equation-set-panel-panel-255-256-2, instance=panel
 256,
*Nset, nset=equation-set-panel-panel-256-257-1, instance=panel
 256,
*Nset, nset=equation-set-panel-panel-256-257-2, instance=panel
 257,
*Nset, nset=equation-set-panel-panel-257-258-1, instance=panel
 257,
*Nset, nset=equation-set-panel-panel-257-258-2, instance=panel
 258,
*Nset, nset=equation-set-panel-panel-258-2408-1, instance=panel
 258,
*Nset, nset=equation-set-panel-panel-258-2408-2, instance=panel
 2408,
*Nset, nset=equation-set-panel-panel-298-299-1, instance=panel
 298,
*Nset, nset=equation-set-panel-panel-298-299-2, instance=panel
 299,
*Nset, nset=equation-set-panel-panel-299-311-1, instance=panel
 299,
*Nset, nset=equation-set-panel-panel-299-311-2, instance=panel
 311,
*Nset, nset=equation-set-panel-panel-311-312-1, instance=panel
 311,
*Nset, nset=equation-set-panel-panel-311-312-2, instance=panel
 312,
*Nset, nset=equation-set-panel-panel-312-313-1, instance=panel
 312,
*Nset, nset=equation-set-panel-panel-312-313-2, instance=panel
 313,
*Nset, nset=equation-set-panel-panel-313-314-1, instance=panel
 313,
*Nset, nset=equation-set-panel-panel-313-314-2, instance=panel
 314,
*Nset, nset=equation-set-panel-panel-314-315-1, instance=panel
 314,
*Nset, nset=equation-set-panel-panel-314-315-2, instance=panel
 315,
*Nset, nset=equation-set-panel-panel-315-2482-1, instance=panel
 315,
*Nset, nset=equation-set-panel-panel-315-2482-2, instance=panel
 2482,
*Nset, nset=equation-set-panel-panel-2232-2248-1, instance=panel
 2232,
*Nset, nset=equation-set-panel-panel-2232-2248-2, instance=panel
 2248,
*Nset, nset=equation-set-panel-panel-2248-2261-1, instance=panel
 2248,
*Nset, nset=equation-set-panel-panel-2248-2261-2, instance=panel
 2261,
*Nset, nset=equation-set-panel-panel-2261-2262-1, instance=panel
 2261,
*Nset, nset=equation-set-panel-panel-2261-2262-2, instance=panel
 2262,
*Nset, nset=equation-set-panel-panel-2262-2263-1, instance=panel
 2262,
*Nset, nset=equation-set-panel-panel-2262-2263-2, instance=panel
 2263,
*Nset, nset=equation-set-panel-panel-2263-2264-1, instance=panel
 2263,
*Nset, nset=equation-set-panel-panel-2263-2264-2, instance=panel
 2264,
*Nset, nset=equation-set-panel-panel-2264-2265-1, instance=panel
 2264,
*Nset, nset=equation-set-panel-panel-2264-2265-2, instance=panel
 2265,
*Nset, nset=equation-set-panel-panel-2306-2307-1, instance=panel
 2306,
*Nset, nset=equation-set-panel-panel-2306-2307-2, instance=panel
 2307,
*Nset, nset=equation-set-panel-panel-2307-2320-1, instance=panel
 2307,
*Nset, nset=equation-set-panel-panel-2307-2320-2, instance=panel
 2320,
*Nset, nset=equation-set-panel-panel-2320-2321-1, instance=panel
 2320,
*Nset, nset=equation-set-panel-panel-2320-2321-2, instance=panel
 2321,
*Nset, nset=equation-set-panel-panel-2321-2322-1, instance=panel
 2321,
*Nset, nset=equation-set-panel-panel-2321-2322-2, instance=panel
 2322,
*Nset, nset=equation-set-panel-panel-2322-2323-1, instance=panel
 2322,
*Nset, nset=equation-set-panel-panel-2322-2323-2, instance=panel
 2323,
*Nset, nset=equation-set-panel-panel-2323-2324-1, instance=panel
 2323,
*Nset, nset=equation-set-panel-panel-2323-2324-2, instance=panel
 2324,
*Nset, nset=equation-set-panel-panel-2408-2423-1, instance=panel
 2408,
*Nset, nset=equation-set-panel-panel-2408-2423-2, instance=panel
 2423,
*Nset, nset=equation-set-panel-panel-2423-2436-1, instance=panel
 2423,
*Nset, nset=equation-set-panel-panel-2423-2436-2, instance=panel
 2436,
*Nset, nset=equation-set-panel-panel-2436-2437-1, instance=panel
 2436,
*Nset, nset=equation-set-panel-panel-2436-2437-2, instance=panel
 2437,
*Nset, nset=equation-set-panel-panel-2437-2438-1, instance=panel
 2437,
*Nset, nset=equation-set-panel-panel-2437-2438-2, instance=panel
 2438,
*Nset, nset=equation-set-panel-panel-2438-2439-1, instance=panel
 2438,
*Nset, nset=equation-set-panel-panel-2438-2439-2, instance=panel
 2439,
*Nset, nset=equation-set-panel-panel-2439-2440-1, instance=panel
 2439,
*Nset, nset=equation-set-panel-panel-2439-2440-2, instance=panel
 2440,
*Nset, nset=equation-set-panel-panel-2482-2483-1, instance=panel
 2482,
*Nset, nset=equation-set-panel-panel-2482-2483-2, instance=panel
 2483,
*Nset, nset=equation-set-panel-panel-2483-2496-1, instance=panel
 2483,
*Nset, nset=equation-set-panel-panel-2483-2496-2, instance=panel
 2496,
*Nset, nset=equation-set-panel-panel-2496-2497-1, instance=panel
 2496,
*Nset, nset=equation-set-panel-panel-2496-2497-2, instance=panel
 2497,
*Nset, nset=equation-set-panel-panel-2497-2498-1, instance=panel
 2497,
*Nset, nset=equation-set-panel-panel-2497-2498-2, instance=panel
 2498,
*Nset, nset=equation-set-panel-panel-2498-2499-1, instance=panel
 2498,
*Nset, nset=equation-set-panel-panel-2498-2499-2, instance=panel
 2499,
*Nset, nset=equation-set-panel-panel-2499-2500-1, instance=panel
 2499,
*Nset, nset=equation-set-panel-panel-2499-2500-2, instance=panel
 2500,
*Nset, nset=load_set, instance=panel
 75,
*Nset, nset=middle-bc, instance=panel
 13685,
*Nset, nset=plate-edge, instance=panel
    1,    2,    3,    4,    5,    6
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** Constraint: Equation-panel-panel-59-75-2
*Equation
2
equation-set-panel-panel-59-75-1, 2, -1.
equation-set-panel-panel-59-75-2, 2, 1.
** Constraint: Equation-panel-panel-75-87-2
*Equation
2
equation-set-panel-panel-75-87-1, 2, -1.
equation-set-panel-panel-75-87-2, 2, 1.
** Constraint: Equation-panel-panel-75-131-1
*Equation
2
equation-set-panel-panel-75-131-1, 1, -1.
equation-set-panel-panel-75-131-2, 1, 1.
** Constraint: Equation-panel-panel-87-88-2
*Equation
2
equation-set-panel-panel-87-88-1, 2, -1.
equation-set-panel-panel-87-88-2, 2, 1.
** Constraint: Equation-panel-panel-88-89-2
*Equation
2
equation-set-panel-panel-88-89-1, 2, -1.
equation-set-panel-panel-88-89-2, 2, 1.
** Constraint: Equation-panel-panel-89-90-2
*Equation
2
equation-set-panel-panel-89-90-1, 2, -1.
equation-set-panel-panel-89-90-2, 2, 1.
** Constraint: Equation-panel-panel-90-91-2
*Equation
2
equation-set-panel-panel-90-91-1, 2, -1.
equation-set-panel-panel-90-91-2, 2, 1.
** Constraint: Equation-panel-panel-91-2232-2
*Equation
2
equation-set-panel-panel-91-2232-1, 2, -1.
equation-set-panel-panel-91-2232-2, 2, 1.
** Constraint: Equation-panel-panel-130-131-2
*Equation
2
equation-set-panel-panel-130-131-1, 2, -1.
equation-set-panel-panel-130-131-2, 2, 1.
** Constraint: Equation-panel-panel-131-143-2
*Equation
2
equation-set-panel-panel-131-143-1, 2, -1.
equation-set-panel-panel-131-143-2, 2, 1.
** Constraint: Equation-panel-panel-131-242-1
*Equation
2
equation-set-panel-panel-131-242-1, 1, -1.
equation-set-panel-panel-131-242-2, 1, 1.
** Constraint: Equation-panel-panel-143-144-2
*Equation
2
equation-set-panel-panel-143-144-1, 2, -1.
equation-set-panel-panel-143-144-2, 2, 1.
** Constraint: Equation-panel-panel-144-145-2
*Equation
2
equation-set-panel-panel-144-145-1, 2, -1.
equation-set-panel-panel-144-145-2, 2, 1.
** Constraint: Equation-panel-panel-145-146-2
*Equation
2
equation-set-panel-panel-145-146-1, 2, -1.
equation-set-panel-panel-145-146-2, 2, 1.
** Constraint: Equation-panel-panel-146-147-2
*Equation
2
equation-set-panel-panel-146-147-1, 2, -1.
equation-set-panel-panel-146-147-2, 2, 1.
** Constraint: Equation-panel-panel-147-2306-2
*Equation
2
equation-set-panel-panel-147-2306-1, 2, -1.
equation-set-panel-panel-147-2306-2, 2, 1.
** Constraint: Equation-panel-panel-227-242-2
*Equation
2
equation-set-panel-panel-227-242-1, 2, -1.
equation-set-panel-panel-227-242-2, 2, 1.
** Constraint: Equation-panel-panel-242-254-2
*Equation
2
equation-set-panel-panel-242-254-1, 2, -1.
equation-set-panel-panel-242-254-2, 2, 1.
** Constraint: Equation-panel-panel-242-299-1
*Equation
2
equation-set-panel-panel-242-299-1, 1, -1.
equation-set-panel-panel-242-299-2, 1, 1.
** Constraint: Equation-panel-panel-254-255-2
*Equation
2
equation-set-panel-panel-254-255-1, 2, -1.
equation-set-panel-panel-254-255-2, 2, 1.
** Constraint: Equation-panel-panel-255-256-2
*Equation
2
equation-set-panel-panel-255-256-1, 2, -1.
equation-set-panel-panel-255-256-2, 2, 1.
** Constraint: Equation-panel-panel-256-257-2
*Equation
2
equation-set-panel-panel-256-257-1, 2, -1.
equation-set-panel-panel-256-257-2, 2, 1.
** Constraint: Equation-panel-panel-257-258-2
*Equation
2
equation-set-panel-panel-257-258-1, 2, -1.
equation-set-panel-panel-257-258-2, 2, 1.
** Constraint: Equation-panel-panel-258-2408-2
*Equation
2
equation-set-panel-panel-258-2408-1, 2, -1.
equation-set-panel-panel-258-2408-2, 2, 1.
** Constraint: Equation-panel-panel-298-299-2
*Equation
2
equation-set-panel-panel-298-299-1, 2, -1.
equation-set-panel-panel-298-299-2, 2, 1.
** Constraint: Equation-panel-panel-299-311-2
*Equation
2
equation-set-panel-panel-299-311-1, 2, -1.
equation-set-panel-panel-299-311-2, 2, 1.
** Constraint: Equation-panel-panel-311-312-2
*Equation
2
equation-set-panel-panel-311-312-1, 2, -1.
equation-set-panel-panel-311-312-2, 2, 1.
** Constraint: Equation-panel-panel-312-313-2
*Equation
2
equation-set-panel-panel-312-313-1, 2, -1.
equation-set-panel-panel-312-313-2, 2, 1.
** Constraint: Equation-panel-panel-313-314-2
*Equation
2
equation-set-panel-panel-313-314-1, 2, -1.
equation-set-panel-panel-313-314-2, 2, 1.
** Constraint: Equation-panel-panel-314-315-2
*Equation
2
equation-set-panel-panel-314-315-1, 2, -1.
equation-set-panel-panel-314-315-2, 2, 1.
** Constraint: Equation-panel-panel-315-2482-2
*Equation
2
equation-set-panel-panel-315-2482-1, 2, -1.
equation-set-panel-panel-315-2482-2, 2, 1.
** Constraint: Equation-panel-panel-2232-2248-2
*Equation
2
equation-set-panel-panel-2232-2248-1, 2, -1.
equation-set-panel-panel-2232-2248-2, 2, 1.
** Constraint: Equation-panel-panel-2248-2261-2
*Equation
2
equation-set-panel-panel-2248-2261-1, 2, -1.
equation-set-panel-panel-2248-2261-2, 2, 1.
** Constraint: Equation-panel-panel-2261-2262-2
*Equation
2
equation-set-panel-panel-2261-2262-1, 2, -1.
equation-set-panel-panel-2261-2262-2, 2, 1.
** Constraint: Equation-panel-panel-2262-2263-2
*Equation
2
equation-set-panel-panel-2262-2263-1, 2, -1.
equation-set-panel-panel-2262-2263-2, 2, 1.
** Constraint: Equation-panel-panel-2263-2264-2
*Equation
2
equation-set-panel-panel-2263-2264-1, 2, -1.
equation-set-panel-panel-2263-2264-2, 2, 1.
** Constraint: Equation-panel-panel-2264-2265-2
*Equation
2
equation-set-panel-panel-2264-2265-1, 2, -1.
equation-set-panel-panel-2264-2265-2, 2, 1.
** Constraint: Equation-panel-panel-2306-2307-2
*Equation
2
equation-set-panel-panel-2306-2307-1, 2, -1.
equation-set-panel-panel-2306-2307-2, 2, 1.
** Constraint: Equation-panel-panel-2307-2320-2
*Equation
2
equation-set-panel-panel-2307-2320-1, 2, -1.
equation-set-panel-panel-2307-2320-2, 2, 1.
** Constraint: Equation-panel-panel-2320-2321-2
*Equation
2
equation-set-panel-panel-2320-2321-1, 2, -1.
equation-set-panel-panel-2320-2321-2, 2, 1.
** Constraint: Equation-panel-panel-2321-2322-2
*Equation
2
equation-set-panel-panel-2321-2322-1, 2, -1.
equation-set-panel-panel-2321-2322-2, 2, 1.
** Constraint: Equation-panel-panel-2322-2323-2
*Equation
2
equation-set-panel-panel-2322-2323-1, 2, -1.
equation-set-panel-panel-2322-2323-2, 2, 1.
** Constraint: Equation-panel-panel-2323-2324-2
*Equation
2
equation-set-panel-panel-2323-2324-1, 2, -1.
equation-set-panel-panel-2323-2324-2, 2, 1.
** Constraint: Equation-panel-panel-2408-2423-2
*Equation
2
equation-set-panel-panel-2408-2423-1, 2, -1.
equation-set-panel-panel-2408-2423-2, 2, 1.
** Constraint: Equation-panel-panel-2423-2436-2
*Equation
2
equation-set-panel-panel-2423-2436-1, 2, -1.
equation-set-panel-panel-2423-2436-2, 2, 1.
** Constraint: Equation-panel-panel-2436-2437-2
*Equation
2
equation-set-panel-panel-2436-2437-1, 2, -1.
equation-set-panel-panel-2436-2437-2, 2, 1.
** Constraint: Equation-panel-panel-2437-2438-2
*Equation
2
equation-set-panel-panel-2437-2438-1, 2, -1.
equation-set-panel-panel-2437-2438-2, 2, 1.
** Constraint: Equation-panel-panel-2438-2439-2
*Equation
2
equation-set-panel-panel-2438-2439-1, 2, -1.
equation-set-panel-panel-2438-2439-2, 2, 1.
** Constraint: Equation-panel-panel-2439-2440-2
*Equation
2
equation-set-panel-panel-2439-2440-1, 2, -1.
equation-set-panel-panel-2439-2440-2, 2, 1.
** Constraint: Equation-panel-panel-2482-2483-2
*Equation
2
equation-set-panel-panel-2482-2483-1, 2, -1.
equation-set-panel-panel-2482-2483-2, 2, 1.
** Constraint: Equation-panel-panel-2483-2496-2
*Equation
2
equation-set-panel-panel-2483-2496-1, 2, -1.
equation-set-panel-panel-2483-2496-2, 2, 1.
** Constraint: Equation-panel-panel-2496-2497-2
*Equation
2
equation-set-panel-panel-2496-2497-1, 2, -1.
equation-set-panel-panel-2496-2497-2, 2, 1.
** Constraint: Equation-panel-panel-2497-2498-2
*Equation
2
equation-set-panel-panel-2497-2498-1, 2, -1.
equation-set-panel-panel-2497-2498-2, 2, 1.
** Constraint: Equation-panel-panel-2498-2499-2
*Equation
2
equation-set-panel-panel-2498-2499-1, 2, -1.
equation-set-panel-panel-2498-2499-2, 2, 1.
** Constraint: Equation-panel-panel-2499-2500-2
*Equation
2
equation-set-panel-panel-2499-2500-1, 2, -1.
equation-set-panel-panel-2499-2500-2, 2, 1.
*End Assembly
**
** MATERIALS
**
*Material, name=steel
*Density
7850., 296.15
*Elastic
 2e+11, 0.3
*Plastic
    3.55e+08,    0.
    3.55e+08, 0.006
 3.56713e+08, 0.016
 3.60895e+08, 0.026
 3.68869e+08, 0.046
  3.7638e+08, 0.066
 3.83488e+08, 0.086
**
** BOUNDARY CONDITIONS
**
** Name: Edge-BC Type: Displacement/Rotation
*Boundary
plate-edge, 3, 3
** Name: Fixed-BC Type: Displacement/Rotation
*Boundary
Fixed-BC, 1, 1
** Name: Middle-BC Type: Displacement/Rotation
*Boundary
middle-bc, 2, 2
** ----------------------------------------------------------------
**
** STEP: Buckle-Step
**
*Step, name=Buckle-Step, nlgeom=NO, perturbation
*Buckle
5, , 10, 500
**
** BOUNDARY CONDITIONS
**
** Name: Edge-BC Type: Displacement/Rotation
*Boundary, op=NEW, load case=1
plate-edge, 3, 3
*Boundary, op=NEW, load case=2
plate-edge, 3, 3
** Name: Fixed-BC Type: Displacement/Rotation
*Boundary, op=NEW, load case=1
Fixed-BC, 1, 1
*Boundary, op=NEW, load case=2
Fixed-BC, 1, 1
** Name: Middle-BC Type: Displacement/Rotation
*Boundary, op=NEW, load case=1
middle-bc, 2, 2
*Boundary, op=NEW, load case=2
middle-bc, 2, 2
**
** LOADS
**
** Name: Load   Type: Concentrated force
*Cload
load_set, 1, 1e+06
load_set, 2, 0.
load_set, 3, 0.
**
** OUTPUT REQUESTS
**
*Restart, write, frequency=0
**
** FIELD OUTPUT: F-Output-1
**
*Output, field, variable=PRESELECT
*End Step
